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/BATCH
/COM,ANSYS RELEASE Release 19.0      BUILD 19.0      UP20171214       17:59:42
/input,menust,tmp,''
/COM,ANSYS RELEASE Release 19.0      BUILD 19.0      UP20171214       17:59:42
/GST,ON
/PLO,INFO,3
/GRO,CURL,ON
/CPLANE,1
WPSTYLE,,,,,,,,0
/PREP7
FLST,2,1,5,ORDE,1
FITEM,2,1
FINISH
! /EXIT,NOSAV
