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/BATCH
/COM,ANSYS RELEASE Release 19.0      BUILD 19.0      UP20171214       10:33:14
/input,menust,tmp,''
/COM,ANSYS RELEASE Release 19.0      BUILD 19.0      UP20171214       10:33:14
/GST,ON
/PLO,INFO,3
/GRO,CURL,ON
/CPLANE,1
WPSTYLE,,,,,,,,0
/SOLU
/STATUS,SOLU
SOLVE
FINISH
/POST1
SET,LIST,2
PRESOL,FORC
FINISH
! /EXIT,MODEL
